// COMSOL Multiphysics 5.1.0.234 model "U1U2_together_backwards_compatible.mph"
// Outline of the model tree

Geometry
  geom1 "Geometry 1" (2D, length unit m)
    r1: Rectangle | base = center; size = {15, 25}
    fin: Finalize "Form Union"

Physics
  c: CoefficientFormPDE on all domains
    dependent variable u = {u, v}
    cfeq1: CoefficientFormPDE (default)
      c = {{1, 0, 0, 1}, {0, 0, 0, 0}, {0, 0, 0, 0}, {40, 0, 0, 40}}
      f = {0.3-u+u^2*v, 0.8-u^2*v}
      da = {1, 0, 0, 1}
    zflx1: ZeroFluxBoundary "Zero Flux 1" (default)
    init1: init "Initial Values 1" (default) | u = exp(-(x^2+y^2))
    pc1: PeriodicCondition on boundaries 2, 3
    cfeq2: CoefficientFormPDE on all domains
      c = {{3/4, 0, 0, 3/4}, {0, 0, 0, 0}, {0, 0, 0, 0}, {30, 0, 0, 30}}
      f = {0.3-u+u^2*v, 0.8-u^2*v}
      da = {1, 0, 0, 1}

Mesh
  mesh1 "Mesh 1" (physics-controlled)
    size: MeshSizeDefault | hauto = 5

Studies
  std1 "Study 1"
    time: Transient "Time Dependent" | tlist = range(0,100,1000)

Solver configurations
  sol1 "Solution 1" (study std1)
    v1: Variables "Dependent Variables 1"
    t1: Time "Time-Dependent Solver 1" | tlist = range(0,100,1000)
      dDef: Direct
      fc1: FullyCoupled | linsolver = dDef

Datasets
  dset1: Solution | solution = sol1

Plots
  pg1: PlotGroup2D "2D Plot Group 1" | data = dset1
    surf1: Surface | expr = u